// COMSOL Multiphysics 5.6.0.401 model "Jiskriste.mph"
// Outline of the model tree

Parameters
  r_1_2 = 1[cm]  // velikost elektrod
  r_okoli = d_2*2.5[cm]  // velikost obalky
  d_2 = 10[cm]  // vzdalenost elektrod od sebe deleno 2
  U = 100[kV]  // Napětí mezi elektrodami

Geometry
  geom1 "Geometry 1" (2D axisymmetric, length unit mm)
    c1: Circle | pos = {0, d_2}; r = r_1_2
    c2: Circle | pos = {0, -d_2}; r = r_1_2
    c3: Circle | r = r_okoli
    fin: Finalize "Form Union"

Materials
  mat1: Common "Air" on domains 1
    def "Basic"
      thermalexpansioncoefficient = alpha_p(pA,T)
      molarmass = 0.02897[kg/mol]
      bulkviscosity = muB(T)
      relpermeability = 1
      relpermittivity = 1
      dynamicviscosity = eta(T)
      ratioofspecificheat = 1.4
      electricconductivity = 0[S/m]
      heatcapacity = Cp(T)
      density = rho(pA,T)
      thermalconductivity = k(T)
      soundspeed = cs(T)
      eta: Piecewise | arg = T; pieces = {200.0, 1600.0, -8.38278E-7+8.35717342E-8*T^1-7.69429583E-11*T^2+4.6437266E-14*T^3-1.06585607E-17*T^4}; argunit = K; fununit = Pa*s
      Cp: Piecewise | arg = T; pieces = {200.0, 1600.0, 1047.63657-0.372589265*T^1+9.45304214E-4*T^2-6.02409443E-7*T^3+1.2858961E-10*T^4}; argunit = K; fununit = J/(kg*K)
      rho: Analytic | expr = pA*0.02897/R_const[K*mol/J]/T; args = {pA, T}; argunit = Pa,K; fununit = kg/m^3
      k: Piecewise | arg = T; pieces = {200.0, 1600.0, -0.00227583562+1.15480022E-4*T^1-7.90252856E-8*T^2+4.11702505E-11*T^3-7.43864331E-15*T^4}; argunit = K; fununit = W/(m*K)
      cs: Analytic | expr = sqrt(1.4*R_const[K*mol/J]/0.02897*T); args = T; argunit = K; fununit = m/s
      an1: Analytic | funcname = alpha_p; expr = -1/rho(pA,T)*d(rho(pA,T),T); args = {pA, T}; argunit = Pa,K; fununit = 1/K
      an2: Analytic "Analytic 2a" | funcname = muB; expr = 0.6*eta(T); args = T; argunit = K; fununit = Pa*s
    RefractiveIndex
      n = 1
      ki = 0
    NonlinearModel
      BA = (def.gamma+1)/2
    idealGas
      Rs = R_const/Mn
      heatcapacity = Cp(T)
      ratioofspecificheat = 1.4
      molarmass = 0.02897
      Cp: Piecewise | arg = T; pieces = {200.0, 1600.0, 1047.63657-0.372589265*T^1+9.45304214E-4*T^2-6.02409443E-7*T^3+1.2858961E-10*T^4}; argunit = K; fununit = J/(kg*K)

Physics
  es: Electrostatics on domains 1
    dependent variable V
    ccn1: ChargeConservation (default)
    axi1: AxialSymmetry (default)
    zc1: ZeroCharge (default)
    init1: init "Initial Values 1" (default)
    pot1: ElectricPotential on boundaries 9, 10 | V0 = U
    gnd1: Ground on boundaries 7, 8

Mesh
  mesh1 "Mesh 1"
    size: MeshSizeDefault | hmax = 13.4; hmin = 0.06; hcurve = 0.3; hgrad = 1.3
    edg1: Edge on boundaries 3
      size1: Size on boundaries 3 | hauto = 1
    ftri1: FreeTri "Free Triangular 1" on domains 1 | smoothmaxiter = 4; smoothmaxdepth = 4

Studies
  std1 "Study 1"
    stat: Stationary

Solver configurations
  sol1 "Solution 1" (study std1)
    v1: Variables "Dependent Variables 1"
    s1: Stationary "Stationary Solver 1"
      dDef: Direct
      fc1: FullyCoupled | linsolver = dDef

Datasets
  dset1: Solution | solution = sol1
  rev1: Revolve2D "Revolution 2D 1" | data = dset1
  cln1: CutLine2D | data = dset1; genpoints = {{0.01, d_2-(r_1_2/2)}, {0.01, -d_2-(r_1_2/2)}}

Plots
  pg1: PlotGroup2D "Electric Potential (es)" | data = dset1; dataisaxisym = on
    surf1: Surface | expr = V
  pg2: PlotGroup3D "Electric Potential, Revolved Geometry (es)" | data = rev1
    surf1: Surface | expr = V
  pg3: PlotGroup1D "1D Plot Group 3" | data = cln1
    lngr1: LineGraph | data = cln1; expr = es.normE; unit = MV/m; descr = Electric field norm