// COMSOL Multiphysics 5.6.0.401 model "Pojistka.mph"
// Outline of the model tree

Parameters
  I_1 = 30[A]

Geometry
  geom1 "Geometry 1" (2D axisymmetric, length unit mm)
    pol1: Polygon
      source = table
      table = 
        {0, 10}
        {2.5, 10}
        {2.5, 8}
        {0.2, 4.93333333333}
        {0.2, -4.93333333333}
        {2.5, -8}
        {2.5, -10}
        {0, -10}
        {0, 10}
    fin: Finalize "Form Union"

Materials
  mat1: Common "Copper" on domains 1
    def "Basic"
      relpermeability = 1
      electricconductivity = 5.998e7[S/m]
      thermalexpansioncoefficient = 17e-6[1/K]
      heatcapacity = 385[J/(kg*K)]
      relpermittivity = 1
      density = 8960[kg/m^3]
      thermalconductivity = 400[W/(m*K)]
    Enu "Young's modulus and Poisson's ratio"
      youngsmodulus = 110e9[Pa]
      poissonsratio = 0.35
    linzRes "Linearized resistivity"
      rho0 = 1.72e-8[ohm*m]
      alpha = 0.0039[1/K]
      Tref = 298[K]

Physics
  ec: ConductiveMedia "Electric Currents" on all domains
    dependent variable V
    cucn1: CurrentConservation (default)
    axi1: AxialSymmetry (default)
    ein1: ElectricInsulation (default)
    init1: init "Initial Values 1" (default)
    gnd1: Ground on boundaries 2
    term1: Terminal on boundaries 3 | I0 = I_1
  ht: HeatTransfer "Heat Transfer in Solids" on all domains
    dependent variable T
    solid1: SolidHeatTransferModel "Solid 1" (default)
    init1: init "Initial Values 1" (default)
    axi1: AxialSymmetry (default)
    ins1: ThermalInsulation (default)
    hs1: HeatSource on domains 1 | Q0_src = root.comp1.ec.Qh
    hf1: HeatFluxBoundary "Heat Flux 1" on boundaries 4-8 | HeatFluxType = ConvectiveHeatFlux; h = 3

Mesh
  mesh1 "Mesh 1" (physics-controlled)
    size: MeshSizeDefault | hauto = 1

Studies
  std1 "Study 1"
    stat: Stationary

Solver configurations
  sol1 "Solution 1" (study std1)
    v1: Variables "Dependent Variables 1"
    s1: Stationary "Stationary Solver 1"
      fc1: FullyCoupled | linsolver = d1; initstep = 0.01; minstep = 1.0E-6; maxiter = 50
      d1: Direct

Datasets
  dset1: Solution | solution = sol1
  rev1: Revolve2D "Revolution 2D 1" | data = dset1

Plots
  pg1: PlotGroup2D "Electric Potential (ec)" | data = dset1; dataisaxisym = on
    surf1: Surface | expr = V
  pg2: PlotGroup3D "Electric Potential, Revolved Geometry (ec)" | data = rev1
    surf1: Surface | expr = V
  pg3: PlotGroup2D "Proudova_hustota" | data = dset1
    surf1: Surface | expr = ec.normJ; descr = Current density norm
  pg4: PlotGroup2D "Ztrátové teplo" | data = dset1
    surf1: Surface | expr = ec.Qrh; descr = Volumetric loss density, electric
  pg5: PlotGroup2D "Teplota" | data = dset1
    surf1: Surface | expr = T; unit = degC; descr = Temperature